<neuroml xmlns="http://www.neuroml.org/schema/neuroml2"  xmlns:xs="http://www.w3.org/2001/XMLSchema" xmlns:xsi="http://www.w3.org/2001/XMLSchema-instance" xsi:schemaLocation="http://www.neuroml.org/schema/neuroml2 https://raw.github.com/NeuroML/NeuroML2/development/Schemas/NeuroML2/NeuroML_v2.1.xsd" id="TestNet">
    <notes>Generated by NeuroMLlite v0.3.5
    Generated network: TestNet
    Generation seed: 1234
    NeuroMLlite parameters:
        input_freq = 50.0
        n_neurons = 33.0</notes>
    <network id="TestNet">
        <property tag="recommended_dt_ms" value="0.025"/>
        <property tag="recommended_duration_ms" value="1000.0"/>
        <population id="X" component="Input" size="33" type="populationList">
            <property tag="region" value="region1"/>
            <instance id="0">
                <location x="966.453535692138757" y="44.073259917535268" z="7.491470058587191"/>
            </instance>
            <instance id="1">
                <location x="910.975962449124154" y="93.926899736376399" z="582.227573058949133"/>
            </instance>
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        </population>
        <population id="Y" component="LIF" size="33" type="populationList">
            <property tag="region" value="region1"/>
            <instance id="0">
                <location x="37.994595016476396" y="50.671484194414418" z="87.667798942292706"/>
            </instance>
            <instance id="1">
                <location x="932.825646839804676" y="69.938728957179606" z="316.986026656810623"/>
            </instance>
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        </population>
    </network>
</neuroml>
